// COMSOL Multiphysics 4.2a (Build: 110) model "update_height.mph"
// Outline of the model tree

Parameters
  rho_ice = 917[kg/m^3]  // ice density
  g = 9.8[m/s^2]  // gravitational acceleration
  Sx = 175/10000  // dummy x surface gradient
  spy = 365.25*24*60*60  // seconds per year
  At = 6.8e-24  // from Paterson for temperate ice [s^(-1)*Pa^(-3)] (used by Brian)
  n = 3  // Glen's flow constant
  epsilon = 1e-30  // to make sure that eta doesn't go to zero
  Sy = 0  // dummy y surface gradient
  etalin = 3.46e12  // viscosity for viscous approximation
  nsl = 3  // sliding exponent (used by brian)
  Asl = 1e-15/(365*24*60*60) [m*Pa^-3/s]  // sliding constant (from ice cascade for now)
  mb = 1  // test mass balance; eventually make this a function that gets input into the program
  delt = .01[yr]  // time step (years)
  Tzb = 0[degC]  // test Tzb
  xmin = 2.0e5[m]
  xmax = 2.5e5[m]
  ymin = .85e5[m]
  ymax = 1.35e5[m]

Functions
  int2: Interpolation | funcs = {basalT, 1}; source = file; filename = /data/docs2/rheadley/src/com4ice/export_to_comsol_tempb.txt; nargs = 2; argunit = m; fununit = degC
  int3: Interpolation | funcs = {mb, 1}; source = file; filename = /data/docs2/rheadley/src/com4ice/export_to_comsol_ice_mass_balance.txt; nargs = 2; argunit = m; fununit = m/yr
  int4: Interpolation | funcs = {H, 1}; source = file; filename = /data/docs2/rheadley/src/com4ice/export_to_comsol_ithick.txt; nargs = 2; extrap = value; extrapvalue = 10
  int5: Interpolation | funcs = {zb, 1}; source = file; filename = /data/docs2/rheadley/src/com4ice/export_to_comsol_bed.txt; nargs = 2
  int7: Interpolation | funcs = {isurf, 1}; source = file; filename = /data/docs2/rheadley/src/com4ice/export_to_comsol_isurf.txt; nargs = 2

Variables
  var1 "Variables 1"
    eta = 1/2*(At^-(1/n))*(epseff)^((1-n)/(n))*1[Pa*s]  // effective viscosity
    epsxx = ux
    epsxy = 1/2*(uy+vx)
    epsxz = 1/2*uz
    epsyy = vy
    epsyz = 1/2*vz
    epszz = wz
    epseff = (epsxx^2+epsyy^2+epsxx*epsyy+epsxy^2+epsxz^2+epsyz^2+epsilon^2)^(1/2)*1[s]  // effective strain rate (unitless to make things run more smoothly, maybe?)
    etax = dtang(eta, x)
    etay = dtang(eta, y)
    epsxzf = 1/2*(uz+wx)
    epsyzf = 1/2*(vz+wy)
    fullepseff = (epsxx^2+epsyy^2+epsxx*epsyy+epsxy^2+epsxzf^2+epsyzf^2+epsilon^2)^(1/2)*1[s]  // effective strain rate
    fulleta = 1/2*(At^-(1/n))*(fullepseff)^((1-n)/(n))*1[Pa*s]
    streff = (fullepseff/At)^(1/n)  // effective stress/second invarient (make sure this is right?!)
  var3 "Geometry"
    S = surface(z)  // surface elevation
    B = bed(z)  // bed elevation
    H = S-B  // ice thickness
    dzdx = dtang(z,x)
    dzdy = dtang(z,y)
    dSdx = surface(dzdx)  // this doesn't work
    dSdy = surface(dzdy)  // this doesn't work
  var5 "Sliding"
    tauxz = 2*fulleta*.5*(uz+wx)
    tauyz = 2*fulleta*.5*(vz+wy)
    uslx = ((Asl/0.8)*tauxz^nsl)
    usly = ((Asl/0.8)*tauyz^nsl)
    taubxSIA = rho_ice*g*H*dSdx
    taubySIA = rho_ice*g*H*dSdy
    ifsliding = ifsl(x,y)
    usl = sqrt(uslx^2+usly^2)
    ifslidingold = (basalT(x,y)>=Tpmp)*1+0
  var6 "Outputs"
    MB = mb(x,y)/spy
    Hp = p/(rho_ice*g)  // ice thickness (full thickness at bed)
    fluxx = genproj1(u)  // Flux using general extrusion
    fluxy = genproj1(v)
    dqdx = dtang(fluxx,x)  // x-derivative of flux2
    dqdy = dtang(fluxy,y)  // y-derivative of flux2
    uave = genproj1(u)/Hp  // depth-averaged velocity
    p1x = dtang(uave,x)*Hp  // test flux part 1
    p2x = dtang(Hp,x)*uave  // test flux part 2
    dqdx2 = p1x+p2x  // compare flux components
    Tpmp = T0-beta*p  // calculate pressure-melting point at base of glacier
    T0 = 0[degC]
    beta = 9.8e-8[K/Pa]  // dependence of melting on pressure, Pattyn, 2003, table 1
    delh = delt*(MB-(dqdx+dqdy))  // change in surface elevation; based on Bryan's. It's different because my flux terms include sliding implicitly
  var8 "Temperature"
    cp = 2009[J/kg/K]  // heat capacity of ice, Pattyn, 2003, table 1
    ki = 6.62e7[J/m/K/yr]  // Corrected! thermal conductivity of ice, Pattyn, 2003, table 1
    kappa = ki/(cp*rho_ice)  // thermal diffusivity of ice
    Lt = 334[kJ/kg]  // latent heat of fusion for water from wikipedia
    GT = 4.2e-2 [W/m^2]
    erfH = erf(zeta*H)
    zeta = sqrt(MB/(2*kappa*H))
    Tterm = sqrt(pi)*GT/(2*zeta)*1[m*K/W]
    Tbed1 = surfaceT-Tterm*erfH
    Tbed2 = Tpmp
    gtTpmp = 1*(Tbed>Tpmp)+0
    Tbed = Tbed1*(Tbed1<=Tbed2)+Tbed2*(Tbed1>Tbed2)
    GTnew = (Tbed1>Tbed2)*2*zeta*(Tbed1-Tbed2)/(erf(zeta*H)*sqrt(pi))*1[W/m/K]
    dm = ki*(GTnew-GT)/Lt
    surfaceT = basalT(x,y)

Selections
  sel1: Explicit "Bed" on boundaries 3
  sel2: Explicit "Surface" on boundaries 4
  sel3: Explicit "Edges" on boundaries 1, 2, 5, 6

Couplings
  genext2: GeneralExtrusion on selection sel2 | opname = surface; dstmap = {x, y, }; usesrcmap = on; srcmap = {x, y, }
  genext3: GeneralExtrusion on selection sel1 | opname = bed; dstmap = {x, y, }; usesrcmap = on; srcmap = {x, y, }
  genproj1: GeneralProjection on all domains

Geometry
  geom1 "Geometry 1" (3D, length unit m)
    ps1: ParametricSurface
      parmin1 = xmin
      parmax1 = xmax
      parmin2 = ymin
      parmax2 = ymax
      coord = {s1, s2, isurf(s1,s2)-H(s1,s2)}
      rtol = 1.0E-4
      maxknots = 10
      prob1: GeomError "Error 1"
        warning1: GeomWarning "Warning 1"
    ps2: ParametricSurface
      axis = {0, 0}
      parmin1 = xmin
      parmax1 = xmax
      parmin2 = ymin
      parmax2 = ymax
      coord = {s1, s2, isurf(s1,s2)}
      rtol = 1.0E-4
      maxknots = 10
      prob1: GeomError "Error 1"
        warning1: GeomWarning "Warning 1"
    blk1: Block | pos = {xmin, ymin, -500}; size = {(xmax-xmin), (ymax-ymin), 3000}
    uni2: Union | input = blk1, ps1, ps2
    del1: Delete "Delete Entities 1" | input = uni2(1) domains 1, 3
    fin: Finalize "Form Union"

Materials
  mat1 "Material 1" on all domains

Physics
  spf: LaminarFlow on all domains
    dependent variable u = {u, v, w}
    EquationForm.form = Stationary
    CompressibilityProperty.Compressibility = Incompressible
    PseudoTimeProperty.locCFL = 1.3^min(niterCMP-1,9)+if(niterCMP>25,9*1.3^min(niterCMP-25,9),0)+if(niterCMP>50,90*1.3^min(niterCMP-50,9),0)
    Stabilization.ck = 100
    TurbulenceProperty.TurbulenceModel = lowRekeps
    fp1: FluidProperties (default) | rho_mat = userdef; rho = epsilon; mu_mat = userdef; mu = fulleta
    wall1: Wall "Bottom" (default)
    init1: init "Initial Values 1" (default) | u = {10/spy, 10/spy, 0}; p = 1e5
    vf1: VolumeForce on domains 1 | F = {0, 0, -rho_ice*g}
    open1: OpenBoundary "Top Free Surface" on selection sel2
    open3: OpenBoundary "Sidewalls Open" on selection sel3 | BoundaryCondition = NoViscousStress
    wall3: Wall (disabled) on selection sel1
      BoundaryCondition = SlidingWall
      uwall = {uslx, usly, 0}
      uvwwall = {((Asl/0.8)*tauxz^2), ((Asl/0.8)*tauyz^2), 0}

Mesh
  mesh5 "Mesh 5"
    size: MeshSizeDefault | hauto = 6
    bl1: BndLayer "Boundary Layers 1" on entire geometry
      blp: BndLayerProp "Boundary Layer Properties" on selection sel1
    ftet1: FreeTet "Free Tetrahedral 1" on remaining entities
    conv1: Convert on entire geometry

Studies
  std5 "Just Velocity"
    stat: Stationary | usesol = on

Solver configurations
  sol2 "Solver 2" (study std5)
    v1: Variables "Dependent Variables 1"
    s1: Stationary "Stationary Solver 1" | stol = 1e-5
      dDef: Direct | mumpsalloc = 3
      fc1: FullyCoupled | initstep = 0.01; minstep = 1.0E-6; maxiter = 200

Datasets
  dset2: Solution | solution = sol2
  surf2: Surface "ZBed" | data = dset2
  surf4: Surface on boundaries 4 | data = dset2
  cpl1: CutPlane | data = dset2; quickx = 1.22e5; genpoints = {{0, 0, 0}, {1, 0, 0}, {0, 1, 0}}
  surf5: Surface on boundaries 3 | data = dset2

Plots
  pg1: PlotGroup3D "Velocity (spf)" | data = dset2
    slc1: Slice | expr = spf.U; genpoints = {{0, 0, 0}, {1, 0, 0}, {0, 1, 0}}
  pg2: PlotGroup3D "Pressure (spf)" | data = surf5
    surf1: Surface | expr = 1; unit = 1
    con1: Contour | expr = p; unit = Pa

Exports
  data2: Data "forICE"
    data = surf2
    expr = {H+delh, usl*spy}
    unit = {m, m/yr}
    descr = {Updated Bed Thickness (m), Sliding Velocity (m/yr)}
    filename = /data/docs2/rheadley/src/com4ice/test_outputGO.txt